// SBML level 2 version 4

model cell()

  // Compartments:
  compartment compartment = 1;

  // Species:
  species $Davg in compartment = 0.4;
  species $X in compartment = 0;
  species $Navg in compartment = 0.4;
  species D in compartment = 0.5;
  species N in compartment = 0.5;
  species B in compartment = 0;
  species R in compartment = 0;

  // Parameters:
  BN0 = 0.01;
  BN = 2;
  p = 3;
  KN = 0.1;
  AN = 1;
  Kc = 1;
  Kt = 1;
  BD0 = 0.01;
  BD = 2;
  KD = 0.01;
  h = 3;
  AD = 1;
  BetaB = 1;
  GammaB = 1;
  AR = 1;

  // Reactions:
  _J0: $X => N; BN0 + BN*(Davg*N)^p/(KN^p + (Davg*N)^p) - AN*N - Kc*N*D - Kt*N*Davg;  // modifiers: Davg, D
  _J1: $X => D; BD0 + BD*B*KD^h/(KD^h + (Davg*N)^h) - AD*D - Kc*N*D - Kt*D*Navg;  // modifiers: B, Davg, N, Navg
  _J2: $X => B; BetaB - GammaB*B;
  _J3: $X => R; Kt*Davg*N - AR*R;  // modifiers: Davg, N
end
