// SBML level 2 version 1
// Created by XMLPrettyPrinter on 8/6/2014 from

model cell()

  // Compartments:
  compartment compartment = 1;

  // Species:
  species $Davg in compartment = 0.4;
  species $Navg in compartment = 50;
  species $X in compartment = 0;
  species $WNT in compartment = 10;
  species D in compartment = 0.1;
  species N in compartment = 1;
  species B in compartment = 0.1;
  species R in compartment = 0.1;

  // Parameters:
  AlphaN = 0.01;
  BetaN = 10;
  nn = 1;
  KSN = 0.8;
  Gamma = 1;
  kc = 0.1;
  kt = 1;
  AlphaD = 0.001;
  BetaD = 10;
  m = 1;
  KDB = 1;
  Gamma = 1;
  kt = 1;
  BetaB = 1;
  Gamma = 1;
  KBW = 1e-5;
  nn = 1;
  KSN = 0.8;

  // Reactions:
  _J1: $X => N; AlphaN + BetaN*(Davg*N)^nn/(KSN^nn + (Davg*N)^nn) - Gamma*N - N*D/kc - Davg*N/kt;
  _J2: $X => D; AlphaD + BetaD*B^m/(KDB^m + B^m) - Gamma*D - N*D/kc - Navg*D/kt;
  _J3: $X => B; BetaB - Gamma*B/(KBW + WNT);
  _J4: $X => R; (Davg*N)^nn/(KSN^nn + (Davg*N)^nn) - Gamma*R;
end
